<?xml version="1.0"?>
<?xml-stylesheet type="text/xsl" href="http://jsbsim.sourceforge.net/JSBSimScript.xsl"?>
<runscript xmlns:xsi="http://www.w3.org/2001/XMLSchema-instance"
    xsi:noNamespaceSchemaLocation="http://jsbsim.sf.net/JSBSimScript.xsd"
    name="T38 trim">

  <use aircraft="T38" initialize="T38-init"/>
  <run start="0.0" end="5" dt="0.0083333">

    <property> simulation/notify-time-trigger </property>
    <property value="1"> simulation/run_id </property>

    <event name="trim">
      <description>trim at the initial conditions</description>
      <condition>
        simulation/sim-time-sec gt 1.0
      </condition>
      <set name="ic/mach" value="0.6"/>
      <set name="ic/h-agl-ft" value="25000.0"/>
      <set name="simulation/do_simple_trim" value="0"/>
      <notify>
        <property caption="altitude (ft)"> position/h-sl-ft</property>
        <property caption="Mach"> velocities/mach</property>
        <property caption="Vc (kts)"> velocities/vc-kts</property>
        <property caption="Vt (ft/s)"> velocities/vt-fps</property>
        <property caption="climb rate (ft/s)"> velocities/h-dot-fps</property>
        <property caption="alpha (deg)"> aero/alpha-deg</property>
        <property caption="beta (deg)"> aero/beta-deg</property>
        <property caption="phi (rad)"> attitude/phi-rad</property>
        <property caption="theta (rad)"> attitude/theta-rad</property>
        <property caption="psi (rad)"> attitude/psi-rad</property>
        <property caption="elevator (rad)"> fcs/elevator-pos-rad</property>
        <property caption="aileron (rad)"> fcs/left-aileron-pos-rad</property>
        <property caption="rudder (rad)"> fcs/rudder-pos-rad</property>
        <property caption="flap (deg)"> fcs/flap-pos-deg</property>
        <property caption="engine 0 thrust (lb)"> propulsion/engine[0]/thrust-lbs</property>
        <property caption="engine 1 thrust (lb)"> propulsion/engine[1]/thrust-lbs</property>
      </notify>
    </event>
  </run>
</runscript>
