<?xml version="1.0"?>
<!--
  File:     J85.xml
  Author:   Aero-Matic v 0.8
  Modified for J85-GE-5, Dave Culp

  Inputs:
    name:           J85
    type:           turbine
    thrust:         2050.0 lb
    augmented?      yes
    injected?       no
-->

<turbine_engine name="J85">
  <milthrust>    1935.0 </milthrust>
  <maxthrust>    2840.0 </maxthrust>
  <bypassratio>     0.0 </bypassratio>
  <tsfc>            1.14 </tsfc>
  <atsfc>           2.64 </atsfc>
  <bleed>           0.03 </bleed>
  <idlen1>          0.0 </idlen1>
  <idlen2>         53.0 </idlen2>
  <maxn1>         100.0 </maxn1>
  <maxn2>         100.0 </maxn2>
  <augmented>         1 </augmented>
  <augmethod>         2 </augmethod>
  <injected>          0 </injected>

  <function name="IdleThrust">
   <table>
    <independentVar lookup="row">velocities/mach</independentVar>
    <independentVar lookup="column">atmosphere/density-altitude</independentVar>
    <tableData>
         -10000     0     10000   20000   30000   40000   50000
     0.0  0.0528  0.0488  0.0528  0.0694  0.0899  0.1183  0.1467
     0.2  0.0600  0.0501  0.0335  0.0544  0.0797  0.1049  0.1342
     0.4  0.0100  0.0047  0.0020  0.0272  0.0595  0.0891  0.1203
    </tableData>
   </table>
  </function>

  <function name="MilThrust">
   <table>
    <independentVar lookup="row">velocities/mach</independentVar>
    <independentVar lookup="column">atmosphere/density-altitude</independentVar>
    <tableData>
                 0.00000   10000.00000   20000.00000   30000.00000   40000.00000   50000.00000
       0.2       1.07796       0.79827       0.00000       0.00000       0.00000       0.00000
       0.3       1.08346       0.81239       0.57573       0.00000       0.00000       0.00000
       0.4       1.09476       0.83136       0.58695       0.39828       0.00000       0.00000
       0.5       1.10317       0.84306       0.61107       0.42045       0.22205       0.00000
       0.6       1.10289       0.85961       0.63520       0.43778       0.25377       0.00000
       0.7       1.09970       0.88099       0.66485       0.46480       0.28351       0.00000
       0.8       1.09360       0.90723       0.69450       0.49422       0.31523       0.18711
       0.9       1.06722       0.94798       0.72232       0.53090       0.34497       0.21875
       1.0       0.00000       0.90884       0.75565       0.57968       0.37273       0.24860
    </tableData>
   </table>
  </function>

  <function name="AugThrust">
   <table>
    <independentVar lookup="row">velocities/mach</independentVar>
    <independentVar lookup="column">atmosphere/density-altitude</independentVar>
    <tableData>
                 0.00000   10000.00000   20000.00000   30000.00000   40000.00000   50000.00000
       0.2       1.06829       0.79301       0.00000       0.00000       0.00000       0.00000
       0.3       1.09970       0.83067       0.60080       0.00000       0.00000       0.00000
       0.4       1.13703       0.86339       0.62604       0.40156       0.00000       0.00000
       0.5       1.18227       0.91261       0.65629       0.42984       0.26071       0.00000
       0.6       1.22751       0.96349       0.69409       0.46966       0.29583       0.00000
       0.7       1.29644       1.02590       0.73690       0.51938       0.34041       0.17514
       0.8       1.36144       1.09987       0.79354       0.57403       0.39309       0.20520
       0.9       1.38692       1.16888       0.86651       0.64517       0.45658       0.23525
       1.0       1.39068       1.22470       0.96209       0.72290       0.52277       0.26166
       1.1       0.00000       0.00000       1.02375       0.79075       0.59166       0.29292
       1.2       0.00000       0.00000       0.00000       0.84046       0.65244       0.31326
    </tableData>
   </table>
  </function>

</turbine_engine>
