<?xml version="1.0"?>
<!--
  File:     engIO470S.xml
  Author:   Aero-Matic v 0.8

  Inputs:
    name:           O470S
    type:           piston
    power:          230.0 hp
    augmented?      no
    injected?       no
-->

<piston_engine name="O470S">
  <minmp unit="INHG">         10.0 </minmp>
  <maxmp unit="INHG">         30.0 </maxmp>
  <displacement unit="IN3">  470.0 </displacement>
  <bsfc unit="LBS/HP*HR">      0.33 </bsfc>
  <maxhp>        230.0 </maxhp>
  <cycles>         4.0 </cycles>
  <idlerpm>      900.0 </idlerpm>
  <maxrpm>      2600.0 </maxrpm>
  <maxthrottle>    1.0 </maxthrottle>
  <minthrottle>    0.1 </minthrottle>
  <sparkfaildrop>  0.0 </sparkfaildrop>
</piston_engine>
