<?xml version="1.0"?>
<?xml-stylesheet type="text/xsl" href="http://jsbsim.sourceforge.net/JSBSimScript.xsl"?>
<runscript xmlns:xsi="http://www.w3.org/2001/XMLSchema-instance"
    xsi:noNamespaceSchemaLocation="http://jsbsim.sf.net/JSBSimScript.xsd"
    name="C182 trim">

  <use aircraft="c182" initialize="c182-init"/>
  <run start="0.0" end="5" dt="0.0083333">

    <property> simulation/notify-time-trigger </property>
    <property value="1"> simulation/run_id </property>

    <event name="trim">
      <description>trim at the initial conditions</description>
      <condition>
        simulation/sim-time-sec gt 1.0
      </condition>
      <set name="fcs/mixture-cmd-norm" value="1.0"/>
      <set name="ic/vt-fps" value="197.474"/>
      <set name="ic/h-agl-ft" value="6000.0"/>
      <set name="simulation/do_simple_trim" value="0"/>
      <notify>
        <property caption="altitude (ft)"> position/h-sl-ft</property>
        <property caption="Vc (kts)"> velocities/vc-kts</property>
        <property caption="Vt (ft/s)"> velocities/vt-fps</property>
        <property caption="climb rate (ft/s)"> velocities/h-dot-fps</property>
        <property caption="alpha (deg)"> aero/alpha-deg</property>
        <property caption="beta (deg)"> aero/beta-deg</property>
        <property caption="phi (rad)"> attitude/phi-rad</property>
        <property caption="theta (rad)"> attitude/theta-rad</property>
        <property caption="psi (rad)"> attitude/psi-rad</property>
        <property caption="elevator (deg)"> fcs/elevator-pos-deg</property>
        <property caption="aileron (deg)"> fcs/left-aileron-pos-deg</property>
        <property caption="rudder (deg)"> fcs/rudder-pos-deg</property>
        <property caption="flap (deg)"> fcs/flap-pos-deg</property>
        <property caption="engine thrust (lb)"> propulsion/engine/thrust-lbs</property>
        <property caption="engine power (hp)"> propulsion/engine/power-hp</property>
        <property caption="prop speed (rev/min)"> propulsion/engine/engine-rpm</property>
        <property caption="fuel flow (gal/hr)"> propulsion/engine/fuel-flow-rate-gph</property>
      </notify>
    </event>
  </run>
</runscript>
